// SBML level 3 version 2
// Created with https://github.com/matthiaskoenig/sbmlutils.

model hctz_fluid()
  // Model for renal body fluid system for blood pressure regulation.
  // Model for blood pressure regulation based on extracellular fluid (ECF) volume and ion balance.
  // Terms of use
  // The content of this model has been carefully created in a manual research effort. This file has been created by Matthias König using sbmlutils. For questions contact koenigmx@hu-berlin.de. Copyright © 2025 Matthias König.
  // This work is licensed under a Creative Commons Attribution 4.0 International License.
  // Redistribution and use of any part of this model, with or without modification, are permitted provided that the following conditions are met:
  // Redistributions of this SBML file must retain the above copyright notice, this list of conditions and the following disclaimer.
  // Redistributions in a different form must reproduce the above copyright notice, this list of conditions and the following disclaimer in the documentation and/or other materials provided with the distribution.
  // This model is distributed in the hope that it will be useful, but WITHOUT ANY WARRANTY; without even the implied warranty of MERCHANTABILITY or FITNESS FOR A PARTICULAR PURPOSE.
  // model units - substance: mmole, time: min, volume: litre, area: m2, length: metre, extent: mmole

  // Compartments:
  compartment ECF = 13.6125 litre; ECF is "extracellular fluid (ECF)";  // SBO:0000290 ncit:C13356 BTO:0000131

  // Species:
  // Concentration in mM corresponding to mEq/l.
  species na in ECF = 140; na is "Sodium (Na+) (ECF)";  // SBO:0000247
  // Concentration in mM corresponding to mEq/l.
  substanceOnly species na_urine in Vurine = 0; na_urine is "Sodium (Na+) (urine)";  // SBO:0000247
  // Concentration in mM corresponding to mEq/l.
  species cl in ECF = 102; cl is "Chloride (Cl-) (ECF)";  // SBO:0000247
  // Concentration in mM corresponding to mEq/l.
  substanceOnly species cl_urine in Vurine = 0; cl_urine is "Chloride (Cl-) (urine)";  // SBO:0000247

  // Parameters:
  // male: 0.6 l/kg female: 0.5 l/kg
  f_TBW = 0.55 l_per_kg; f_TBW is "Total body water (TBW) fraction of bodyweight (male)";  // SBO:0000002
  // Around 1/3 of total body water (TBW) is extracellular fluid (ECF).
  f_ECF = 0.33 dimensionless; f_ECF is "ECF fraction of TBW";  // SBO:0000002
  // ECF value is calculated based on body weight and sex.
  ECF_ref has litre; ECF_ref is "Reference extracellular fluid volume (ECF)";  // SBO:0000002
  // Psys value is deendent on sex and age.
  // Young Adult Men (18-39 years): Average=120/80 mmHg
  // Middle-aged Men (40-59 years): Average=125−130/80−85 mmHg
  // Older Men (60+ years): Average=135−140/85−90 mmHg
  // Young Adult Women (18-39 years): Average=110−120/70−80mmHg
  // Middle-aged Women (40-59 years): Average=120−130/80−85mmHg
  // Older Women (60+ years): Average=135−140/85−90mmHg
  Psys_ref = 120 mmHg; Psys_ref is "Reference systolic blood pressure";  // SBO:0000002
  // Psys value is dependent on sex and age.
  // Young Adult Men (18-39 years): Average=120/80 mmHg
  // Middle-aged Men (40-59 years): Average=125−130/80−85 mmHg
  // Older Men (60+ years): Average=135−140/85−90 mmHg
  // Young Adult Women (18-39 years): Average=110−120/70−80mmHg
  // Middle-aged Women (40-59 years): Average=120−130/80−85mmHg
  // Older Women (60+ years): Average=135−140/85−90mmHg
  Pdia_ref = 80 mmHg; Pdia_ref is "Reference diastolic blood pressure";  // SBO:0000002
  Psys has mmHg; Psys is "Systolic blood pressure";  // SBO:0000002
  Pdia has mmHg; Pdia is "Diastolic blood pressure";  // SBO:0000002
  Mr_nacl = 58.44 g_per_mole; Mr_nacl is "Molecular weight sodium chloride";  // SBO:0000002
  Mr_na = 22.99 g_per_mole; Mr_na is "Molecular weight sodium";  // SBO:0000002
  Mr_cl = 35.45 g_per_mole; Mr_cl is "Molecular weight chloride";  // SBO:0000002
  vin_nacl = 0.023766 mmole_per_min; vin_nacl is "NaCl uptake via food";  // SBO:0000002
  vin_h2o = 0.001597222 l_per_min; vin_h2o is "H2O uptake via food";  // SBO:0000002
  // Excretion rate sodium urine.
  k_na = 0.0001697571 l_per_min;  // SBO:0000002
  // Excretion rate chloride urine.
  k_cl = 0.000233 l_per_min;  // SBO:0000002
  // Excretion rate water urine.
  k_h2o = 0.000117335 per_min;
  // Excretion rate water urine.
  diuresis has l_per_min;
  vin_na has mg_per_min;
  vin_cl has mg_per_min;
  vout_na has mg_per_min;
  vout_cl has mg_per_min;
  Vurine = NaN; Vurine has dimensionless;

  // Assignment rules:
  ECF_ref := f_ECF*f_TBW*BW;
  // Simplified calculation of blood pressure based on change relative to reference ECF volume.
  // Regulation is more complicated probably via: Increased ECF volume → Increased blood volume → Increased venous return → Increased cardiac output → Increased blood pressure.
  Psys := Psys_ref*ECF/ECF_ref;
  // Simplified calculation of blood pressure based on change relative to reference ECF volume.
  // Regulation is more complicated probably via: Increased ECF volume → Increased blood volume → Increased venous return → Increased cardiac output → Increased blood pressure.
  Pdia := Pdia_ref*ECF/ECF_ref;
  // Excretion rate water urine.
  diuresis := k_h2o*ECF;
  // Uptake sodium.
  vin_na := NACL_UPTAKE*Mr_nacl;
  // Uptake chloride.
  vin_cl := NACL_UPTAKE*Mr_nacl;
  // Excretion sodium.
  vout_na := NA_EXCRETION*Mr_na;
  // Excretion chloride.
  vout_cl := CL_EXCRETION*Mr_cl;

  // Rate rules:
  // Rate rule for calculation of water change ECF.
  ECF' = vin_h2o - diuresis;
  // Rate rule for calculation of water change urine.
  Vurine' = diuresis;

  // Reactions:
  NACL_UPTAKE: => na + cl; vin_nacl; NACL_UPTAKE is "Na/Cl uptake via food";  // SBO:0000655
  NA_EXCRETION: na => na_urine; k_na*na; NA_EXCRETION is "Na excretion urine";  // SBO:0000655
  CL_EXCRETION: cl => cl_urine; k_cl*cl; CL_EXCRETION is "Cl excretion urine";  // SBO:0000655

  // Events:
  event_time_0: at (time >= 0), t0=false: ECF = ECF_ref;

  // Unit definitions:
  unit g_per_mole = gram / mole; g_per_mole is "g/mole";
  unit kg = 1000 gram;
  unit l_per_kg = litre / (1000 gram); l_per_kg is "l/kg";
  unit l_per_min = litre / (60 second); l_per_min is "l/min";
  unit l_per_min_mmole = litre / (60 second * 1e-3 mole); l_per_min_mmole is "l/min/mmole";
  unit m2 = metre^2; m2 is "meter^2";
  unit mM = 1e-3 mole / litre; mM is "mmole/liter";
  unit mg = 1e-3 gram;
  unit mg_per_min = 1e-3 gram / (60 second); mg_per_min is "mg/min";
  unit min = 60 second;
  unit ml = 1e-3 litre;
  unit mmHg = 133.3224 newton / metre^2; mmHg is "133.32239 N/m^2";
  unit mmole = 1e-3 mole;
  unit mmole_per_min = 1e-3 mole / (60 second); mmole_per_min is "mmole/min";
  unit mmole_per_min_l = 1e-3 mole / (60 second * litre); mmole_per_min_l is "mmole/min/liter";
  unit per_hr = 1 / (3600 second); per_hr is "1/hr";
  unit per_min = 1 / (60 second); per_min is "1/min";
  unit per_min_l = 1 / (60 second * litre); per_min_l is "1/min/liter";
end
