// SBML level 3 version 2
// Created with https://github.com/matthiaskoenig/sbmlutils.

model hctz_kidney(v_HCTZEX, Vext, Vki, Vurine, hctz_ext, hctz_urine)
  // Model for hydrochlorothiazide excretion into the urine
  // Model for hydrochlorothiazide renal excretion
  // The content of this model has been carefully created in a manual research effort.
  // Terms of use
  // Copyright © 2026 Matthias König.
  // This work is licensed under a Creative Commons Attribution 4.0 International License.
  // Redistribution and use of any part of this model, with or without modification, are permitted provided that the following conditions are met:
  // Redistributions of this SBML file must retain the above copyright notice, this list of conditions and the following disclaimer.
  // Redistributions in a different form must reproduce the above copyright notice, this list of conditions and the following disclaimer in the documentation and/or other materials provided with the distribution.
  // This model is distributed in the hope that it will be useful, but WITHOUT ANY WARRANTY; without even the implied warranty of MERCHANTABILITY or FITNESS FOR A PARTICULAR PURPOSE.
  // hasTaxon taxonomy:9606 snomedct:337915000
  // hasProperty mamo:MAMO_0000046 ncit:C49184 ncit:C15299 ncit:C3117 ncit:C79372 ncit:C79371
  // ncit:C29098
  // isDescribedBy doi:10.5281/zenodo.15427418
  // occursIn FMA:7203 BTO:0000671 ncit:C12415
  // model units - substance: mmole, time: min, volume: litre, area: m2, length: metre, extent: mmole

  // Compartments:
  compartment Vext = 1 litre; Vext is "plasma";  // SBO:0000290 ncit:C13356 BTO:0000131
  compartment Vki = 0.3 litre; Vki is "kidney";  // SBO:0000290 FMA:7203 BTO:0000671 ncit:C12415
  compartment Vurine = 1 litre;  // SBO:0000290 FMA:12274 ncit:C13283 BTO:0001419

  // Species:
  species hctz_ext in Vext = 0; hctz_ext is "hydrochlorothiazide (plasma)";  // SBO:0000247 ncit:C29098 CHEBI:5778 pubchem.compound:3639
  substanceOnly species hctz_urine in Vurine = 0; hctz_urine is "hydrochlorothiazide (urine)";  // SBO:0000247 ncit:C29098 CHEBI:5778 pubchem.compound:3639

  // Parameters:
  // 1.0: increased kidney function 1.0: normal kidney function (healthy control) <1.0: decreased kidney function
  f_renal_function = 1 dimensionless;  // SBO:0000009
  urine_volume = 1 ml;  // SBO:0000009
  HCTZEX_Vmax = 0.9096321 mmole_per_min_l; HCTZEX_Vmax is "rate urinary excretion of hydrochlorothiazide";  // SBO:0000009
  HCTZEX_Km = 0.001 mM; HCTZEX_Km is "Michaelis constant excretion of hydrochlorothiazide";  // SBO:0000027
  v_HCTZEX has mmole_per_min; v_HCTZEX is "rate of HCTZ excretion";

  // Assignment rules:
  v_HCTZEX := f_renal_function*Vki*HCTZEX_Vmax*hctz_ext/(hctz_ext + HCTZEX_Km);

  // Reactions:
  HCTZEX: hctz_ext => hctz_urine; v_HCTZEX; HCTZEX is "hydrochlorothiazide renal excretion";  // SBO:0000655

  // Unit definitions:
  unit g_per_mole = gram / mole; g_per_mole is "g/mole";
  unit l_per_min = litre / (60 second); l_per_min is "l/min";
  unit l_per_min_mmole = litre / (60 second * 1e-3 mole); l_per_min_mmole is "l/min/mmole";
  unit m2 = metre^2; m2 is "meter^2";
  unit mM = 1e-3 mole / litre; mM is "mmole/liter";
  unit mg = 1e-3 gram;
  unit mg_per_min = 1e-3 gram / (60 second); mg_per_min is "mg/min";
  unit min = 60 second;
  unit ml = 1e-3 litre;
  unit mmole = 1e-3 mole;
  unit mmole_per_min = 1e-3 mole / (60 second); mmole_per_min is "mmole/min";
  unit mmole_per_min_l = 1e-3 mole / (60 second * litre); mmole_per_min_l is "mmole/min/liter";
  unit per_hr = 1 / (3600 second); per_hr is "1/hr";
  unit per_min = 1 / (60 second); per_min is "1/min";
  unit per_min_l = 1 / (60 second * litre); per_min_l is "1/min/liter";
end
